<?xml version="1.0"?>
<fdm_config name="nesc_brick_damped" version="2.0" release="ALPHA">

 <fileheader>
  <author>MMP project — non-production check-case model</author>
  <description>
   NESC atmospheric check-case 3 body (damped). Homogeneous rectangular solid,
   8 x 4 x 2.25 in on the body x/y/z axes. Mass and inertia are the
   published values (NASA/TM-2015-218675 Vol. II, appendix Table 4, about
   the CM, products of inertia zero).

   Written here rather than taken from any bundled aircraft: this file
   carries no third-party data. Coefficients are the published Table 5
   values: CD 0.01, Clp = Cmq = Cnr = -1.0, everything else zero.

   Check-case 3 is NOT a "no aerodynamics" case -- the damping derivatives
   are explicitly used, so rotational kinetic energy and angular momentum
   are no longer conserved and the acc02 invariants do not apply here.
  </description>
 </fileheader>

 <metrics>
  <!-- Reference geometry is unused while every coefficient is zero. Values
       are the brick's own dimensions so nothing is invented. -->
  <wingarea  unit="FT2"> 0.2222222 </wingarea>  <!-- 8 in x 4 in -->
  <wingspan  unit="FT" > 0.3333333 </wingspan>  <!-- 4 in -->
  <chord     unit="FT" > 0.6666667 </chord>     <!-- 8 in -->
  <location name="AERORP" unit="IN"> <x>0</x> <y>0</y> <z>0</z> </location>
  <location name="EYEPOINT" unit="IN"> <x>0</x> <y>0</y> <z>0</z> </location>
  <location name="VRP" unit="IN"> <x>0</x> <y>0</y> <z>0</z> </location>
 </metrics>

 <mass_balance>
  <!-- Appendix Table 4, about the CM. Products of inertia are zero. -->
  <ixx unit="SLUG*FT2"> 0.001894220 </ixx>
  <iyy unit="SLUG*FT2"> 0.006211019 </iyy>
  <izz unit="SLUG*FT2"> 0.007194665 </izz>
  <ixy unit="SLUG*FT2"> 0.0 </ixy>
  <ixz unit="SLUG*FT2"> 0.0 </ixz>
  <iyz unit="SLUG*FT2"> 0.0 </iyz>
  <!-- 0.155404754 slug x 32.174 ft/s^2 -->
  <emptywt unit="LBS"> 5.00 </emptywt>
  <location name="CG" unit="IN"> <x>0</x> <y>0</y> <z>0</z> </location>
 </mass_balance>

 <ground_reactions/>
 <propulsion/>
 <flight_control name="none"/>

 <aerodynamics>
  <!-- Table 5: CD 0.01, Clp = Cmq = Cnr = -1.0. Standard damping form,
       qbar S b (Clp p b / 2V) etc. -->
  <axis name="DRAG">
   <function name="aero/force/drag">
    <description>CD 0.01, constant</description>
    <product>
     <property>aero/qbar-psf</property>
     <property>metrics/Sw-sqft</property>
     <value>0.01</value>
    </product>
   </function>
  </axis>

  <axis name="ROLL">
   <function name="aero/moment/roll_damp">
    <description>Clp = -1.0</description>
    <product>
     <property>aero/qbar-psf</property>
     <property>metrics/Sw-sqft</property>
     <property>metrics/bw-ft</property>
     <property>aero/bi2vel</property>
     <property>velocities/p-aero-rad_sec</property>
     <value>-1.0</value>
    </product>
   </function>
  </axis>

  <axis name="PITCH">
   <function name="aero/moment/pitch_damp">
    <description>Cmq = -1.0</description>
    <product>
     <property>aero/qbar-psf</property>
     <property>metrics/Sw-sqft</property>
     <property>metrics/cbarw-ft</property>
     <property>aero/ci2vel</property>
     <property>velocities/q-aero-rad_sec</property>
     <value>-1.0</value>
    </product>
   </function>
  </axis>

  <axis name="YAW">
   <function name="aero/moment/yaw_damp">
    <description>Cnr = -1.0</description>
    <product>
     <property>aero/qbar-psf</property>
     <property>metrics/Sw-sqft</property>
     <property>metrics/bw-ft</property>
     <property>aero/bi2vel</property>
     <property>velocities/r-aero-rad_sec</property>
     <value>-1.0</value>
    </product>
   </function>
  </axis>
 </aerodynamics>

</fdm_config>
